# Stochastic cooling
c := 3*10^8  # m/s
m_p := 0.938  # GeV
A_Au := 197
f_max := 8*10^9  # Гц
f_min := 2*10^9  # Гц
W := f_max - f_min = 6000000000
N_bunch := 10^9
C_orb := 503.04  # m
F_bunch := 4
σ_bunch := 0.6  # m
N := N_bunch*C_orb/(F_bunch*σ_bunch) = 2.096e11
# Оценка идеального случая
ν := W/N = 0.028626
τ_per := 1/ν = 34.9333
# Оценка для структур
δ := 10^-3
α_1 := 0.0365794
α_2 := 0.0125947
L_1 := 136.689
L_2 := 366.351
α_gen := (α_1*L_1 + α_2*L_2)/C_orb = 0.019112
η(α, γ) := α - 1/γ^2
β(γ) := sqrt(1 - 1/γ^2)
γ(E) := E/m_p + 1
η_pk(α_pk, γ) := α_pk - 1/γ^2
T_pk(γ, L_pk) := L_pk/(β(γ)*c)
E_kin(γ) := (γ - 1)*m_p
η_kp(α_kp, γ) := α_kp - 1/γ^2
T_kp(γ, L_kp) := L_kp/(β(γ)*c)
γ(0.272) = 1.28998
γ_tr(α) := 1/sqrt(α)
E_kin(1.28985692) = 0.271886
M_pk(f_max, f_min, γ, α_pk, L_pk, δ) := 1/(2*(f_max + f_min)*η_pk(α_pk, γ)*T_pk(γ, L_pk)*δ)
M_kp(f_max, f_min, γ, α_kp, L_kp, δ) := 1/(2*(f_max - f_min)*η_kp(α_kp, γ)*T_kp(γ, L_kp)*δ)
ν(f_max, f_min, γ, α_pk, L_pk, α_kp, L_kp, δ) := W/N*(1 - 1/M_pk(f_max, f_min, γ, α_pk, L_pk, δ)^2)^2/M_kp(f_max, f_min, γ, α_kp, L_kp, δ)
τ(f_max, f_min, γ, α_pk, L_pk, α_kp, L_kp, δ) := 1/ν(f_max, f_min, γ, α_pk, L_pk, α_kp, L_kp, δ)
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